# AguaClara Water Treatment Plants
# Automated Design
# User Inputs:
# [reference: userinputs.xmcd]
# Engineer Entered Values: | Values used to Draw Plant:
T_Tank = 0.15 m
Q_Plant := 645*L/min
T_PltWall = 0.15 m
# sed tank parameters
T_StockPlatform := T_PltWall
beta =  # error: This variable is undefined.
T_Grit := T_PltWall
W_SedTank := 1 m  # Width of the lamella
T_Platform := 30 cm
L_SedPlate := 90 cm  # length of the lamella
T_Channel := 15 cm
B_SedPlate := 5 cm  # lamella spacing
W_Walkway := 1 m
DrillSeries = 0
acad_version := 2006
PipeSpec := 2
# Design References
# [reference: DesignAssumptions.xmcd]
# [reference: PipeDatabase.xmcd]
# [reference: FluidsFunctions.xmcd]
# [reference: Sedimentation.xmcd]
# [reference: Channel.xmcd]
# [reference: FCMdesign.xmcd]
# [reference: Flocculation.xmcd]
# [reference: EntranceTank.xmcd]
# [reference: Elevations.xmcd]
# [reference: plantleveltank.xmcd]
# [reference: Sludge Drain.xmcd]
# [reference: Launder.xmcd]
# AutoCAD References
# [reference: basics.xmcd]
# [reference: inputs.xmcd]
# [reference: tank.xmcd]
# [reference: lamina.xmcd]
# [reference: cross.xmcd]
# [reference: Tee.xmcd]
# [reference: elbow.xmcd]
# [reference: pipe.xmcd]
# [reference: pipe.no_zoom.xmcd]
# [reference: Sludge.xmcd]
# [reference: Channel.xmcd]
# [reference: Manifold.xmcd]
# [reference: SedTankslopes.xmcd]
# [reference: SedTank.xmcd]
# [reference: floctank.xmcd]
# [reference: GritChamber.xmcd]
# [reference: platform.xmcd]
# [reference: PlantLevelTank.xmcd]
# [reference: stocka.xmcd]
# [reference: stockb.xmcd]
