# AguaClara Water Treatment Plants
# Automated Design
# Add variable descriptions next to every varible so it is easy to interpret what this all means.
# Design References
# [reference: BasicInputs- hmr6_Gracias.xmcd]
# Use BasicClientInputs and ExpertClientInputs when this is run by LabVIEW.
# Use BasicInputs and ExpertInputs to use the program in MathCAD
# Change the reference by
# - right clicking
# - select properties
# - reference tab
# - type in the correct file name
B_SedPlateFramePipes = 0.3 m
# [reference: DesignAssumptions.xmcd]
# [reference: MathFunctions.xmcd]
# [reference: PipeDatabase.xmcd]
Q_Plant = 0.05 m^3/s
# [reference: MinorLossCoefficients.xmcd]
# [reference: FluidsFunctions.xmcd]
# [reference: Sedimentation Tank-rb563.xmcd]
# [reference: Floc Hopper - New Design.xmcd]
# [reference: FCM.xmcd]
# [reference: Flocculator 3.xmcd]
# [reference: RapidMixer.xmcd]
# [reference: EntranceTankDim.xmcd]
# [reference: Materials List.xmcd]
W_SedBay = 1 m
N_SedTanks = 4
W_ExitChannelMin = 0.254 m
W_SedBay = 1 m
N_SedBays = 3
# Sed Tanks and Slopes:
Geom_ExitChannel = 1
B_SedPort =  # error: This variable is undefined.  # Height of the narrowest part of the manifold ports
N_SedTanks = 4
W_SedPort =  # error
H_SedBetween = 21.4931 cm  # Distance from the top of the inlet manifold to the bottom of the ledge supporting the lamella frame
A_SedPort =  # error  # Port Area
L_Sed = 5.14286 m
W_SedSludgeFlat =  # error  # Distance between tips of manifold plates (space alloted for the drain holes
N_SedBays = 3  # Number of bays of inlet manifolds in each sed tank
AN_SedTopInlet =  # error  # Angle of the top of the inlet manifold
L_SedPort =  # error  # Length of the port through which water exits the inlet manifold
AN_SedBottom =  # error  # Angle of the bottom of inlet manifold
W_SedSlopePlate =  # error  # Width of ferrous cement plates in whice one manifold port is cut
Q_SedBay = 4.16667 L/s
W_SedBayActual = 0.9 m
L_SedSlopeManifold =  # error  # This is the extra distance between the last slope and the wall
# Sedimentation Tank Sludge Drain:
N_SedSludgeOrifices = 63  # per cell
Ti_SludgeDrain = 10 min  # Tank Drain time
W_SedSludge = 17.0367 cm  # Width of the sludge channel
B_SedSludgeOrifices = 8.15455 cm  # Distance center to center between drain orifices
H_SedSludge = 8.51836 cm  # Depth of the sludge channel
T_SedSludge = 6.75918 cm
T_SedSludge = 6.75918 cm
# Thickness of the plate topping the sludge channel
# through which drain holes are formed
W_SedDrainCover = 27.0367 cm
D_SedSludgeOrifice = 0.014 m  # Diameter of drain orifices
W_SedInletBottom = 0.364816 m
N_SedSludgeOrifices = 63
ND_SedSludgeValve = 3 in
# Sedimentation Tank Dimensions:
Z_SedSludge = 0.152775 m  # Height from 0 of the top of the sludge drain
H_SedBottomSlope =  # error  # Height of the bottom slope
H_SedTopSlope =  # error  # Height of the top of the inlet manifold
Z_SedSlopes = 0.741355 m  # Height from 0 of the top of the inlet manifold
W_Sed = 3 m  # Total tank wall height
L_Sed = 5.14286 m  # Total tank length
# Inlet Channel:
HW_InletChannel = 0.469105 m  # Width of the drop chimneys connecting channel to sed inlet manifolds
W_InletChannel = 0.795088 m  # length of drop chimmneys
L_Channel = 12.75 m
W_SedManifoldEntrance =  # error
L_SedManifoldEntrance =  # error
H_SedManifoldPort =  # error  # Ports at bottom of inlet chimney are set to be triangles
W_SedManifoldPort =  # error
N_SedInletPipes = 2  # per sed bay
H_InletChannel = 0.569105 m
# Sedimentation Tank Effluent Launder:
N_SedLaunderOrifices = 62  # Number of orifices per launder
Q_SedLaunderOrifices = 3.44745e-5 m^3/s  # More Launder Dimensions
ND_SedLaunder = 4 in
B_SedLaunderOrifices = 0.1 m  # Center to center launder spacing
L_SedLaunder = 3.68225 m
# Exit Channel:
D_SedLaunderOrifice = 0.354331 in
W_ExitChannel = 0.515514 m
H_ExitChannel = 0.569105 m
L_ExitChannel = 12.75 m
H_PltWeir = 0.334729 m  # height of the weir carrying water to the distribution tank
HW_ExitChannel = 0.429105 m  # water height in exit channel from 0
# Lamella:
L_SedPlate = 0.6096 m
B_SedPlate = 2.60075 cm  # center to center distance between lamella
S_SedPlate = 2 cm  # spacing between lamella
N_SedPlates = 109  # Number of Sed Plates per Sedimentation Tank Bay.
AN_SedPlate = 60 deg
ZW_ExitChannel =  # error
V_SedC = 8.78866 m/day
L_SedActive = 3.26259 m
T
V_SedUp = 70 m/day
Z_SedLaunder = 1.60817 m
H_SedPlate = 0.527929 m
H_SedAbove = 0.152024 m  # Height of water needed above the lamella
N_SedPlates = 109
HW_Sed = 1.70304 m
H_Sed = 1.80304 m
Z_Mp = 1.23394 m
N_SedPorts =  # error
H_SedBayDivider = 0.741355 m
W_SedSlopePlateRemaining =  # error
W_SedBayDivider = 0.15 m
# Sedimentation Tank Floc Hopper:
A_FlocHopper =  # error
L_FlocHopper = 0.9 m  # Length of the hopper cement plate
L_FlocHopperOffset = 0.3048 m  # distance from the edge of the channel to the bottom of the first lamella (collection distance)
W_FlocHopper =  # error  # width of the hopper set within each bay
# Flow Controller:
N_Fcm = 6
ID_FcmTube = 4.318 mm
ID_FcmTube = 0.17 in
L_FcmTube = 257.56 cm
Q_FcmTubeMax = 375 mL/min
HL_FcmValve = 26.1265 cm
# Flocculator: | Look at Flocculator Positioning arrays
W_FlocChannel = 0.725454 m
# Fill last channel with bafffles from last channel
# Fix port width to be based on energy dissipation in that channel
ED_Floc = 6 mW/kg
# Adjust spacing after the number of baffles per channel is known.
# Check the residence time of the flocculator should be at least 20minutes
HW_FlocEnd = 1.70304 m
X_FlocBaffles = [
    0.732143, 0.732143, 0.732143, 0.732143, 0.732143, 0.732143, 0.732143, 0.908571;
    1.61429, 1.61429, 1.61429, 1.61429, 1.61429, 1.61429, 1.61429, 1.96714;
    2.49643, 2.49643, 2.49643, 2.49643, 2.49643, 2.49643, 2.49643, 3.02571;
    3.37857, 3.37857, 3.37857, 3.37857, 3.37857, 3.37857, 3.37857, 4.08429;
    4.26071, 4.26071, 4.26071, 4.26071, 4.26071, 4.26071, 4.26071, 0
] m
L_FlocBaffles = [
    0.914455, 0.914455, 0.914455, 0.914455, 0.914455, 0.914455, 0.914455, 1.02614;
    1.20257, 1.20257, 1.20257, 1.20257, 1.20257, 1.20257, 1.20257, 0.738027;
    0.914455, 0.914455, 0.914455, 0.914455, 0.914455, 0.914455, 0.914455, 1.02614;
    1.20257, 1.20257, 1.20257, 1.20257, 1.20257, 1.20257, 1.20257, 0.738027;
    0.914455, 0.914455, 0.914455, 0.914455, 0.914455, 0.914455, 0.914455, 0
] m
Z_FlocBaffles = [
    0, 0, 0, 0, 0, 0, 0, 0.908571;
    0.732143, 0.732143, 0.732143, 0.732143, 0.732143, 0.732143, 0.732143, 0;
    0, 0, 0, 0, 0, 0, 0, 0.908571;
    0.732143, 0.732143, 0.732143, 0.732143, 0.732143, 0.732143, 0.732143, 0;
    0, 0, 0, 0, 0, 0, 0, 0
] m
N_FlocChannels = 8
L_FlocTank = 41.1429 m
HL_Floc = 18.1671 cm
HW_FlocStart = 1.88471 m
S_FlocBaffle = [73.2143; 73.2143; 73.2143; 73.2143; 73.2143; 73.2143; 73.2143; 90.8571] cm
B_FlocBaffle = [88.2143; 88.2143; 88.2143; 88.2143; 88.2143; 88.2143; 88.2143; 105.857] cm
N_FlocChannelBaffles = [5; 5; 5; 5; 5; 5; 5; 4]
W_FlocPort = [0.682143; 0.682143; 0.682143; 0.682143; 0.682143; 0.682143; 0.682143; 0.858571] m
HL_FlocChannels = [2.38773; 2.38773; 2.38773; 2.38773; 2.38773; 2.38773; 2.38773; 1.45306] cm
L_FlocBaffleLower = [0.914455; 0.914455; 0.914455; 0.914455; 0.914455; 0.914455; 0.914455; 0.738027] m
L_FlocBaffleUpper = [1.20257; 1.20257; 1.20257; 1.20257; 1.20257; 1.20257; 1.20257; 1.02614] m
H_FlocPort = [0.778629; 0.778629; 0.778629; 0.778629; 0.778629; 0.778629; 0.778629; 0.767702] m
Ti_Floc = 16.9437 min  # residence time of the flocculator
N_FlocBaffles = 39
# Rapid Mix Unit and Entrance Tank:
L_Et = 2.48424 m
W_Et = 2.48424 m
H_Et = 2.28471 m  # Height of Entrance Tank Orifice
W_EtOrifice[30] = 0.031 m
L_trueET[30] = 1.24529 m  # Length of Entrance Tank Orifice
Pi_EtFlow[30] =  # error: This value must be a vector.  # Ratio of the minimum flow divided by the maximum flow through the plant.
L_FlocEntryOrifice = 72.5454 cm  # Length of orifice entering into flocculator from Rapid Mix Unit
W_FlocEntryOrifice = 51.2063 cm  # Height of orifice entering into flocculator
ED_Diffusion =  # error  # Minimum Energy Dissipation needed
HL_FlocEntryOrifice = 0.137848 cm  # Head loss caused by entering flocculation tank.
A_FlocEntry = 0.371479 m^2
A_EtOrifice = [
    400.218; 399.72; 399.224; 398.73; 398.237; 397.746; 397.257; 396.77; 396.285; 395.801
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] cm^2
HW_EtTotal =  # error  # Total Height of water at beginning of rapid mix unit
HW_Channel2 =  # error  # Height of water at the back of the entrance tank channel (from channel bottom)
HW_EtChannel = 5.07367 cm  # Height of Waterfall into flocculator
W_EtChannel = 73.2143 cm  # Widt of entrance tank channel
Vol_Stock = 4050 L  # Volume of chemical stock tanks
ZW_ExitChannel =  # error  # Water Level at the end of the plant in the exit channel and exit channel box
HW_Sed = 1.70304 m
HW_FlocStart = 1.88471 m  # Water level at the beginning of the floc tank
HL_Floc = 18.1671 cm  # just for ref. the head loss throught the floc tank
HW_EtTotal =  # error  # Height of the water in the entrance channel
# Materials List:
L_LaunderPipe =  # error
N_Launders = 24
L_LaunderPipeTotal = 88.3741 m
N_Valves = 12
N_LaunderCouplings = 24
N_ValveCouplings = 12
N_SedPlatesTotal = 1308
N_SedPlatesPerSheet = 6
N_SedPlateSheets = 218
N_PipeSedPlateStand =  # error
A_SedTank =  # error
# [reference: AutoCADMasterProgram.xmcd]
# AutoCAD References
AC_SedTank = [
    "_-view o t"; "-layer m tank"; "c t 132,132,132"; "tank"; "  "; "_-view o t _zoom w 0.16,-0.16,0 -5.30286,3.16,1.51364 _box 0,0,0 -5.14286,3,1.51364 _box 0.15,-0.15,-0.15 -5.29286,3.15,1.51364 _subtract 0.15,-0.15,-0.15  0,0,0 "; "-layer s 0"; "  "; "-layer f tank"; "  "
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]
AC_EntranceTank = [
    "-layer m entrancetank";
    "c t 214,214,214";
    "entrancetank";
    "  ";
    "_-view o t _zoom w 0.16,20.55884,0 -2.64424,23.36307,2.01212 _box 0,20.71884,0 -2.48424,23.20307,2.01212 _box 0.15,20.56884,-0.15 -2.63424,23.35307,2.01212 _subtract 0.15,20.56884,-0.15  0,20.71884,0 ";
    "-layer s 0";
    "  ";
    "-layer f entrancetank";
    "  ";
    "-layer s entrancetank";
    "  ";
    "_box -0.51161,20.56884,1.96212 0,20.71884,2.01212";
    "-layer s 0";
    "  ";
    "-layer t entrancetank";
    "  ";
    "_-view o t";
    "_subtract 0.15,20.71884,0  -0.51161,20.56884,1.96212 ";
    "-layer f entrancetank";
    "  "
]
AC_FlocTank = [
    "-layer m floctank";
    "c t 91,91,91";
    "floctank";
    "  ";
    "_-view o t _zoom w 0.16,12.44,0 -5.30286,20.72884,1.71212 _box 0,12.6,0 -5.14286,20.56884,1.71212 _box 0.15,12.45,-0.15 -5.29286,20.71884,1.71212 _subtract 0.15,12.45,-0.15  0,12.6,0 ";
    "_box -5.29286,13.60983,0 0.15,13.75983,1.71212";
    "_box -0.46161,13.60983,1.11922 0,13.75983,0";
    "_subtract -5.29286,13.60983,0  -0.46161,13.60983,1.11922 ";
    "_box -5.29286,14.76967,0 0.15,14.91967,1.71212";
    "_box -5.14286,14.76967,1.11922 -4.68125,14.91967,0"
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]
